// COMSOL Multiphysics 6.0.0.318 model "Devoir 2 COMSOL.mph"
// Outline of the model tree

Parameters
  k = 4e-9  // constant

Geometry
  geom1 "Geometry 1" (1D axisymmetric, length unit m)
    i1: Interval | coord = {0, 0.5}
    fin: Finalize "Form Union"

Physics
  tds: DilutedSpecies "Transport of Diluted Species" on all domains
    dependent variable c
    EquationForm.form = Transient
    TransportMechanism.Convection = 0
    cdm1: ConvectionDiffusionMigration "Transport Properties 1" (default)
      DiffusionCoefficientSource = mat
      minput_temperature_src = fromCommonDef
      D_c = 1e-10[m^2/s]
      Dchem_c = 1e-10[m^2/s]
    axi1: AxialSymmetry (default)
    nflx1: NoFlux (default)
    init1: init "Initial Values 1" (default)
    conc1: Concentration on boundaries 2 | species = 1; c0 = 12
    reac1: Reactions on domains 1 | R_c = -k*c

Mesh
  mesh1 "Mesh 1"
    size: MeshSizeDefault | hmax = 0.5/(1000-1); custom = on
    edg1: Edge on remaining entities

Studies
  std1 "Study 1"
    time: Transient "Time Dependent" | tunit = Gs; tlist = 1

Solver configurations
  sol1 "Solution 1" (study std1)
    v1: Variables "Dependent Variables 1"
    t1: Time "Time-Dependent Solver 1" | tlist = 1; rtol = 0.005; maxorder = 2; stabcntrl = on
      fc1: FullyCoupled
        linsolver = d1
        maxiter = 8
        damp = 0.9
        jtech = once
        stabacc = aacc
        aaccdim = 5
        aaccmix = 0.9
        aaccdelay = 1
      d1: Direct "Direct, concentrations (tds)" | linsolver = pardiso; pivotperturb = 1.0E-13

Datasets
  dset1: Solution | solution = sol1
  rev1: Revolve1D "Revolution 1D 1" | data = dset1; startangle = -90; revangle = 225

Plots
  pg1: PlotGroup1D "Concentration (tds)" | data = dset1; typeintitle = off
    lngr1: LineGraph on domains 1 | expr = c; xdata = expr; xdataexpr = r
  pg2: PlotGroup2D "2D Plot Group 2" | data = rev1
    surf1: Surface | expr = c

Exports
  plot1: Plot | filename = C:\Users\lucas\OneDrive\Documents\GitHub\Mec8211\Devoir 2\data\comsol_data.txt